(а)
f(x) := 2*x^5 + 4/(5*x^5) - 2/sqrt(x) + 3  # (в)
k(x) := e^sin(7*x + 3)
d/dx(k(x)) → 7*e^sin(7*x + 3)*cos(7*x + 3)
d/dx(f(x)) → 10*x^4 - 4/x^6 + x^(-3/2)
d^2/dx^2(k(x)) → 49*e^sin(7*x + 3)*cos(7*x + 3)^2 - 49*e^sin(7*x + 3)*sin(7*x + 3)
d^2/dx^2(f(x)) → 40*x^3 + 24/x^7 - 3/(2*x^(5/2))
(б)
g(x) := (x^2 - 3)*(sin(x) + 5^x)
d/dx(g(x)) → 2*x*(sin(x) + 5^x) + (cos(x) + 5^x*ln(5))*(x^2 - 3)
d^2/dx^2(g(x)) → 2*sin(x) - (sin(x) - 5^x*ln(5)^2)*(x^2 - 3) + 2*5^x + 4*x*(cos(x) + 5^x*ln(5))
